f(x) := x^2/(x^2 + 2)*cos(x)
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x := 5
f1t(x) := d/dx(f(x)) → 2*x*cos(x)/(x^2 + 2) - x^2*sin(x)/(x^2 + 2) - 2*x^3*cos(x)/(x^2 + 2)^2
f1t(x) = 0.895675
f2t(x) := d^2/dx^2(f(x)) → 2*cos(x)/(x^2 + 2) - x^2*cos(x)/(x^2 + 2) - 10*x^2*cos(x)/(x^2 + 2)^2 + 8*x^4*cos(x)/(x^2 + 2)^3 + 4*x^3*sin(x)/(x^2 + 2)^2 - 4*x*sin(x)/(x^2 + 2)
f2t(x) = -0.214242
f1t(x) = 0.895675
f3t(x) := d^3/dx^3(f(x)) → 6*x^3*cos(x)/(x^2 + 2)^2 - 6*sin(x)/(x^2 + 2) + 72*x^3*cos(x)/(x^2 + 2)^3 - 48*x^5*cos(x)/(x^2 + 2)^4 + x^2*sin(x)/(x^2 + 2) + 30*x^2*sin(x)/(x^2 + 2)^2 - 24*x^4*sin(x)/(x^2 + 2)^3 - 6*x*cos(x)/(x^2 + 2) - 24*x*cos(x)/(x^2 + 2)^2
f3t(x) = -0.95097
f2t(x) = -0.214242
f4t(x) := d^4/dx^4(f(x)) → x^2*cos(x)/(x^2 + 2) - 24*cos(x)/(x^2 + 2)^2 - 12*cos(x)/(x^2 + 2) + 60*x^2*cos(x)/(x^2 + 2)^2 + 312*x^2*cos(x)/(x^2 + 2)^3 - 48*x^4*cos(x)/(x^2 + 2)^3 - 672*x^4*cos(x)/(x^2 + 2)^4 + 384*x^6*cos(x)/(x^2 + 2)^5 - 8*x^3*sin(x)/(x^2 + 2)^2 - 288*x^3*sin(x)/(x^2 + 2)^3 + 192*x^5*sin(x)/(x^2 + 2)^4 + 8*x*sin(x)/(x^2 + 2) + 96*x*sin(x)/(x^2 + 2)^2
f3t(x) = -0.95097
f4t(x) = 0.220014
f4t(x) = 0.220014
f1(x, h) := (f(x) - f(x - h))/h
f1(x, 10^-3) = 0.895782
f12(x, h) := (f(x + h) - f(x - h))/(2*h)
f12(x, 10^-3) = 0.895675
f1(x, 10^-3) = 0.895782
f2(x, h) := (f(x + h) - 2*f(x) + f(x - h))/h^2
f12(x, 10^-3) = 0.895675
f3(x, h) := (f(x + 2*h) - 2*f(x + h) + 2*f(x - h) - f(x - 2*h))/(2*h^3)
f2(x, 10^-3) = -0.214242
f2(x, 10^-3) = -0.214242
f4(x, h) := (f(x + 2*h) - 4*f(x + h) + 6*f(x) - 4*f(x - h) + f(x - 2*h))/h^4
f3(x, 10^-3) = -0.950971
f3(x, 10^-3) = -0.950971
f4(x, 10^-3) = 0.220157
eps1(x, h) := |(f1(x, h) - f1t(x))/f1t(x)|
f4(x, 10^-3) = 0.220157
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h1 := 5e-8
eps1(x, h1) = 1.25278e-10
eps12(x, h) := |(f12(x, h) - f1t(x))/f1t(x)|
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h12 := 1.7384e-7
eps12(x, h12) = 8.92649e-10
eps2(x, h) := |(f2(x, h) - f2t(x))/f2t(x)|
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h2 := 0.0001735
eps2(x, h2) = 1.30297e-9
eps3(x, h) := |(f3(x, h) - f3t(x))/f3t(x)|
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h3 := 0.001332
eps3(x, h3) = 8.28065e-7
eps4(x, h) := |(f4(x, h) - f4t(x))/f4t(x)|
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h4 := 0.00192
eps4(x, h4) = 5.68214e-7
