f(x) := x^2/(x^2 + 4)*cos(x)
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# Данные для расчёта
f(0) = 0
n := 100
x[0] := 0.5
T := 10
# Метод Эйлера
# При n=100 | При n=200
t3[0] := 0
m := 0 .. n
m3 := 0 .. 2*n
t[0] := 0
x3[m3] := x[0]
h := (T - t[0])/n
h = 0.1
h3 := h/2
h3 = 0.05
x[m] := x[0]
t3[m3] := m3*h3
t[m] := m*h
x3[m3 + 1] := x3[m3] + h3*f(x3[m3])
x[m + 1] := x[m] + h*f(x[m])
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x3[n] = 0.887184
x[n] = 1.36429
# Индивидуальное задание(4 вариант)
K1(x1, h, t) := h*f(x1)
K2(x1, h, t) := h*f(x1 + 1/3*K1(x1, h, t))
K3(x1, h, t) := h*f(x1 + 2/3*K2(x1, h, t))
x1[0] := x[0]
x4[0] := x[0]
x1[m + 1] := x1[m] + 1/4*K1(x1[m], h, t[m]) + 3/4*K3(x1[m], h, t[m])
x4[m3 + 1] := x4[m3] + 1/4*K1(x4[m3], h3, t3[m3]) + 3/4*K3(x4[m3], h3, t3[m3])
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x1[n] = 1.36505
x4[n] = 0.889
# Методы Рунге-Кутты
xxx := 0.5
D(t, xxx) := xxx^2/(xxx^2 + 4)*cos(xxx)
Z3 := rkfixed(xxx, t3[0], T, 2*n, D)
Z := rkfixed(xxx, t[0], T, n, D)
t3[m3] := Z3[m3, 0]
t[m] := Z[m, 0]
x5[m3] := Z3[m3, 1]
x2[m] := Z[m, 1]
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x5[n] = 0.889
x2[n] = 1.36505
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# Метод Эйлера | Метод 4 варианта | Метод Рунге-Кутты | Метод Эйлера | Метод 4 варианта | Метод Рунге-Кутты
x[n] = 1.36429
x1[n] = 1.36505
x2[n] = 1.36505
x3[n] = 0.887184
x4[n] = 0.889
x5[n] = 0.889
x3[2*n] = 1.36467
x4[2*n] = 1.36505
x5[2*n] = 1.36505
# Расчёт погрешностей
E(p, x1, x2) := |(x1 - x2)/(2^p - 1)|*2^p
E(1, x3[2*n], x[n]) = 0.00077825
E(4, x4[2*n], x1[n]) = 7.24077e-9
E(4, x5[2*n], x2[n]) = 1.14626e-9
