# Исследование зависимости погрешности интерполирования от количества узлов
FX(x) := x^2/(x^2 + 4)*cos(x)
n := 4
a := 1
b := 6
ii := 0 .. n
h := (b - a)/n
i := 0 .. n
j := 0 .. n
xi[ii] := a + ii*h
yi[ii] := FX(xi[ii])
f(x) := sum(yi[i]*product(if(i == j, 1, (x - xi[j])/(xi[i] - xi[j])), j), i)  # формула Лагранжа
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# Количество узлов 5 (небольшое количество узлов)
nn := 9
i := 0 .. nn
h := (b - a)/nn
xxi[i] := a + i*h
yyi[i] := FX(xxi[i])
i := 0 .. nn
j := 0 .. nn
f(x) := sum(yyi[i]*product(if(i == j, 1, (x - xxi[j])/(xxi[i] - xxi[j])), j), i)
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# Количество узлов 10 (рациональное уоличесвто узлов)
n := 70
ii := 0 .. n
h := (b - a)/n
xi[ii] := a + ii*h
yi[ii] := FX(xi[ii])
i := 0 .. n
j := 0 .. n
f(x) := sum(yi[i]*product(if(i == j, 1, (x - xi[j])/(xi[i] - xi[j])), j), i)
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# Количество узлов 71 (Влияние вычислительной погрешности)
# Узлы Чебышева
n := 70
i := 0 .. n
j := 0 .. n
xo := (a + b)/2
Δ := (b - a)/2
xx[i] := xo + Δ*cos((2*i + 1)/(n + 1)*π/2)
yy[i] := FX(xx[i])
f(x) := sum(yy[i]*product(if(i == j, 1, (x - xx[j])/(xx[i] - xx[j])), j), i)
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# Количество узлов 71
