# Аппроксимация методом наименьших квадратов
# Опорная функция:
FX(x) := x^2/(x^2 + 4)*cos(x)
a := 1
b := 6
# Количество точек:
m := 255
p := π/(2*(m + 1))
s := (a + b)/2
d := (b - a)/2
h := (b - a)/m
ii := 0 .. m
xi[ii] := a + ii*h
md(x) - функция распределения равномерно распределенной величины на интервале (0, x)
yi[ii] := (FX(xi[ii]) + rnd(0.8) - 0.4)
n := 10  # - степень полинома
nn := m + 1
z := regress(xi, yi, n)  # - коэффициенты полинома
ff(x) := interp(z, xi, yi, x)
j := 0 .. m
tx[j] := min(xi) + j*(max(xi) - min(xi))/nn
fff[j] := ff(tx[j])  # - вычисление значений полинома
i := 0 .. m
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# Результаты расчетов:
j := 0 .. m
DD[j] := |yi[j] - fff[j]|
DDD := sum((yi[kk] - fff[kk])^2, kk = 0 .. m)
DDD := DDD/(m - n)
DDD = 0.0504007  # - остаточная дисперсия
scp := mean(DD)
scp = 0.186597  # - cредняя ошибка
smax := max(DD)
smax = 0.471805  # - максимальная ошибка
jj := 0 .. m
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# График ошибок:
# Таблица для дисперсий (определение минимальной степени полинома)
ff(x, n) := interp(regress(xi, yi, n), xi, yi, x)
j := 0 .. m
tx[j] := min(xi) + j*(max(xi) - min(xi))/(m + 1)
fff(j, n) := ff(tx[j], n)
nn := 3 .. 21
DDD(n) := sum((yi[kk] - fff(kk, n))^2/(m - n), kk = 0 .. m)
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DDD(3) = 0.0569386
DDD(18) = 0.0513014
DDD(4) = 0.0502344
DDD(19) = 0.0514867
DDD(5) = 0.0501103
DDD(20) = 0.0515049
DDD(6) = 0.0498957
DDD(21) = 0.0709668
DDD(7) = 0.0498675
DDD(8) = 0.0500106
DDD(9) = 0.0502118
DDD(10) = 0.0504007
DDD(11) = 0.0506057
DDD(12) = 0.0508134
DDD(13) = 0.0508354
DDD(14) = 0.0510139
DDD(15) = 0.0511991
DDD(16) = 0.051371
DDD(17) = 0.0511657
n := 7
nn := m + 1
z := regress(xi, yi, n)
ff(x) := interp(z, xi, yi, x)
j := 0 .. m
tx[j] := min(xi) + j*(max(xi) - min(xi))/nn
fff[j] := ff(tx[j])
i := 0 .. m
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j := 0 .. m
DD[j] := |yi[j] - fff[j]|
DDD := sum((yi[kk] - fff[kk])^2, kk = 0 .. m)
DDD := DDD/(m - n)
DDD = 0.0498675  # - остаточная дисперсия
scp := mean(DD)
scp = 0.186343  # - cредняя ошибка
smax := max(DD)
smax = 0.451606  # - максимальная ошибка
jj := 0 .. m
# График ошибок:
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